// SBML level 2 version 4

model main()

  // Compartments:
  compartment compartment = 1;

  // Species:
  // M
  species Ethanol in compartment = 2.5e-5/compartment;
  species NAD in compartment = 0; NAD is "NAD+";
  species Acetaldehyde in compartment = 0;
  species H in compartment = 0; H is "H+";
  species NADH in compartment = 0;
  species S_Hydroxymethyl_glutathione in compartment = 0; S_Hydroxymethyl_glutathione is "S-(Hydroxymethyl)glutathione";
  species S_Formylglutathione in compartment = 0; S_Formylglutathione is "S-Formylglutathione";

  // Reactions:
  // Vmax*A/(Km+A)
  // Michaelis-Menten
  ADH5_oxidises_S_HMGSH_to_S_FGSH: NAD + S_Hydroxymethyl_glutathione => S_Formylglutathione + H + NADH; Vmax*A/(Km + A); ADH5_oxidises_S_HMGSH_to_S_FGSH is "[ADH5 oxidises S-HMGSH to S-FGSH]";
    Vmax = 5e-7; Km = 0.0002;
end
