// SBML level 2 version 4

model main()

  // Compartments:
  compartment compartment = 1;

  // Species:
  // M
  species Ethanol in compartment = 2.5e-5/compartment;
  species NAD in compartment = 0; NAD is "NAD+";
  species Acetaldehyde in compartment = 0;
  species H in compartment = 0; H is "H+";
  species NADH in compartment = 0;
  species S_Hydroxymethyl_glutathione in compartment = 0; S_Hydroxymethyl_glutathione is "S-(Hydroxymethyl)glutathione";
  species S_Formylglutathione in compartment = 0; S_Formylglutathione is "S-Formylglutathione";

  // Reactions:
  // Vmax*A/(Km+A)
  // Michaelis-Menten
  Reaction0: Ethanol + NAD => Acetaldehyde + H + NADH; Reaction0_Vmax*Reaction0_A/(Reaction0_Km + Reaction0_A); Reaction0 is "[ethanol + NAD+ => acetaldehyde + NADH + H+,Ethanol is oxidized by NAD+ to form acetaldehyde, NADH, and H+]";
    Reaction0_Km = 0.0007; Reaction0_Vmax = 2.233333e-7;
  // Vmax*A/(Km+A)
  // Michaelis-Menten
  ADH5_oxidises_S_HMGSH_to_S_FGSH: NAD + S_Hydroxymethyl_glutathione => S_Formylglutathione + H + NADH; ADH5_oxidises_S_HMGSH_to_S_FGSH_Vmax*ADH5_oxidises_S_HMGSH_to_S_FGSH_A/(ADH5_oxidises_S_HMGSH_to_S_FGSH_Km + ADH5_oxidises_S_HMGSH_to_S_FGSH_A); ADH5_oxidises_S_HMGSH_to_S_FGSH is "[ADH5 oxidises S-HMGSH to S-FGSH]";
    ADH5_oxidises_S_HMGSH_to_S_FGSH_Vmax = 5e-7; ADH5_oxidises_S_HMGSH_to_S_FGSH_Km = 0.0002;
end
